# This is a test sheet to help me build a truss solver in java.
N1 := [0; 0]*ft
N2 := [50; 0]*ft
N3 := [25; 9]*ft
δ_12 := N1 - N2
L_1 := |δ_12|
δ_12 = [-50; 0] ft
L_1 = 50 ft
δ_21 := -δ_12
δ_13 := N1 - N3
L_2 := |δ_13|
δ_13 = [-25; -9] ft
L_2 = 26.5707 ft
δ_31 := -δ_13
δ_23 := N2 - N3
L_3 := |δ_23|
δ_23 = [25; -9] ft
L_3 = 26.5707 ft
δ_32 := -δ_23
# Solving the 3 node truss out with a force of:
F := -100 lbf
# Reaction Forces:
A_x := 0 lbf
A_y := 0 lbf
B_y := 0 lbf
Given
0 == F*(N3[0] - N1[0]) + B_y*(N2[0] - N1[0])
0 == F*(N3[0] - N2[0]) + A_y*(N1[0] - N2[0])
[A_y; B_y] := Find(A_y, B_y)
A_y = 50 lbf
B_y = 50 lbf
# Member Forces:
B_12 := 0 lbf
B_13 := 0 lbf
B_23 := 0 lbf
Given
0 == F + B_13*δ_31[1]/L_2 + B_23*δ_32[1]/L_3
0 == B_23*δ_32[0]/L_3 + B_13*δ_31[0]/L_2
0 == B_13*δ_13[0]/L_2 + B_12
[B_12; B_13; B_23] := Find(B_12, B_13, B_23)
B_12 = 138.889 lbf
B_13 = 147.615 lbf
B_23 = 147.615 lbf
A := [0; 0]*ft
B := [50; 0]*ft
C := [25; 90]*ft
D := [-75; 25]*ft
E := [65; 5]*ft
δ_ab := B - A = [50; 0] ft
δ_ba := -δ_ab
L_ab := |δ_ab| = 50 ft
δ_ac := C - A = [25; 90] ft
δ_ca := -δ_ac
L_ac := |δ_ac| = 93.4077 ft
δ_ad := D - A = [-75; 25] ft
δ_da := -δ_ad
L_ad := |δ_ad| = 79.0569 ft
δ_bc := C - B = [-25; 90] ft
δ_cb := -δ_bc
L_bc := |δ_bc| = 93.4077 ft
δ_be := E - B = [15; 5] ft
δ_eb := -δ_be
L_be := |δ_be| = 15.8114 ft
δ_dc := C - D = [100; 65] ft
δ_cd := -δ_dc
L_dc := |δ_dc| = 119.269 ft
δ_ce := E - C = [40; -85] ft
δ_ec := -δ_ce
L_ce := |δ_ce| = 93.9415 ft
F_1 := 0 lbf
F_2 := 200 lbf
F_3 := 300 lbf
# Calculating the Support Reactions:
A_y := 1 lbf
B_y := 1 lbf
Given
0 == F_2*δ_ad[0] + F_1*δ_ac[0] + F_3*(E[0] - A[0]) + B_y*δ_ab[0]
0 == F_2*(D[0] - B[0]) + A_y*δ_ba[0] + F_1*δ_bc[0] + F_3*δ_be[0]
[A_y; B_y] := Find(A_y, B_y)
A_y = -410 lbf
B_y = -90 lbf
# Calculating Forces in beams AD & DC
F_ad := 1*lbf
F_dc := 1 lbf
Given
0 == F_2 + F_ad*δ_da[1]/L_ad + F_dc*δ_dc[1]/L_dc
0 == F_ad*δ_da[0]/L_ad + F_dc*δ_dc[0]/L_dc
[F_ad; F_dc] := Find(F_ad, F_dc)
F_ad = 214.392 lbf
F_dc = -242.58 lbf
# Calculating Forces in beams AC & AB
F_ab := 1 lbf
F_ac := 1 lbf
Given
F_ad*δ_ad[0]/L_ad = -203.39 lbf
0 == A_y + F_ad*δ_ad[1]/L_ad + F_ac*δ_ac[1]/L_ac + F_ab*δ_ab[1]/L_ab
0 == F_ad*δ_ad[0]/L_ad + F_ac*δ_ac[0]/L_ac + F_ab*δ_ab[0]/L_ab
[F_ab; F_ac] := Find(F_ab, F_ac)
F_ab = 108.333 lbf
F_ac = 355.16 lbf
# Calculating the Forces in beams CB & CE
F_ce := 1 lbf
F_bc := 1 lbf
Given
0 == F_1 + F_dc*δ_cd[1]/L_dc + F_ce*δ_ce[1]/L_ce + F_bc*δ_cb[1]/L_bc + F_ac*δ_ca[1]/L_ac
0 == F_dc*δ_cd[0]/L_dc + F_ac*δ_ca[0]/L_ac + F_bc*δ_cb[0]/L_bc + F_ce*δ_ce[0]/L_ce
[F_ce; F_bc] := Find(F_ce, F_bc)
F_ce = -286.601 lbf
F_bc = 51.1895 lbf
# Calculating the Force in beam BE
F_be := 1 lbf
Given
0 == F_be*δ_eb[1]/L_be + F_ce*δ_ec[1]/L_ce + F_3
F_be := Find(F_be)
F_be = 128.635 lbf
# Easily see the solutions:
A_y = -410 lbf
B_y = -90 lbf
F_ab = 108.333 lbf
F_ac = 355.16 lbf
F_bc = 51.1895 lbf
F_ad = 214.392 lbf
F_dc = -242.58 lbf
F_ce = -286.601 lbf
F_be = 128.635 lbf
